# #7 (30 pts) A 10 mole% pentane, 90% dodecane mixture is to be flashed at 2 bar
# pressure.
x_F := 10%
P := 2 bar
# a) What is the minimum mole fraction of pentane in the liquid that can be achieved?
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x_pentmin := 0.003
# b) What is the maximum mole fraction of pentane in the vapor that can be achieved?
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y_pentmax := 0.91  # his answers says 0.091
# c) If 60% of the feed is vaporized, what would the mole fraction of pentane be in the
# liquid and vapor
solve block
    # guess values
    a := 0.3
    # constraints
    1/(a + 1) == 60%
    # solver
    a := find(a) = 0.666667
end solve block
1/(B/D + 1) == 60%
m := -a = -0.666667
y_D := 0.15
x_B := 0.005
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# d) What fraction of the feed must be vaporized in order to produce a vapor product at 60
# mole% pentane?
# find yD1 on graph, go down to xB1, plug into eq.
x_B1 := 0.03
y_D1 := 0.6
m := -(y_D1 - x_F)/(x_B1 - x_F) = 7.14286
VP := 1/(m + 1)*100 = 12.2807  # percent
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# e) At what temperature would the flash operate in part d)
y_D := 0.6
T := 209 °C
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kmol := 1000 mol
# #8 (70 pts) A mixture of 30 mole % hexane/70% heptane is to be separated in a
# distillation column at 1 atm pressure. The distillate is to leave at 99 mole % hexane and
# the bottoms at 1 mole % hexane. The feed enters at a rate of 400 kmol/hr.
x_F := 30%
F := 400 kmol/hr
x_D := 99%
x_B := 1%
# a) What is the flow rate of distillate and residue (in kmol/hr)
solve block
    # guess values
    D := 10 kmol/hr
    B := 10 kmol/hr
    # constraints
    F*x_F == D*x_D + B*x_B
    F == D + B
    # solver
    [D; B] := find(D, B) = [118.367; 281.633] kmol/hr
end solve block
# b) What is the minimum reflux ratio that can be used if the feed is a saturated liquid?
solve block
    # guess values
    R_min := 2
    # constraints
    R_min/(R_min + 1) == (x_D - 0.5075)/(x_D - x_F)
    # solver
    R_min := find(R_min) = 2.3253
end solve block
# c) What is the minimum reflux ratio that can be used is the feed is a saturated vapor?
solve block
    # guess values
    R_min := 2
    # constraints
    R_min/(R_min + 1) == (x_D - x_F)/(x_D - 0.155)
    # solver
    R_min := find(R_min) = 4.75862
end solve block
# d) What is the minimum number of stages needed?
N_min := 11  # stages
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# e) For a saturated liquid feed and a reflux ratio of 3, how many ideal stages are needed
# and what is the optimum location of the feed stage?
R := 3
y := x_D/(R + 1) = 0.2475
N_ideal := 22  # stages  # Feed on stage 10
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# If the overall efficiency is 70%, how many actual stages would be required?
E_0 := 70%
N_real := ceil(N_ideal/E_0) = 32  # stages
# What diameter column (in ft) would be needed based on conditions at the top tray?
# Assume 75% flooding and an active tray area of 80%. The properties of a 99%
# hexane/heptane mixture are given in the table below
T_B := 68.9 °C
ρ_l := 615 kg/m^3
ρ_v := 3.07 kg/m^3
MW := 86.3 kg/kmol
σ := 13.3 dyne/cm
F_lv := R/(R + 1)*sqrt(ρ_v/ρ_l) = 0.0529899
solve block
    # guess values
    K_V := 0.5
    # constraints
    log(K_V) == -0.94506 - 0.70234*log(F_lv) - 0.22618*log(F_lv)^2
    # solver
    K_V := find(K_V)*ft/s = 0.382684 ft/s
end solve block
μ_c := K_V*sqrt((ρ_l - ρ_v)/ρ_v)*(σ/(20 dyne/cm))^0.2 = 1.51776 m/s
flooding := 75%
AA := 80%
μ_0 := μ_c*flooding = 3.73463 ft/s
V := D*(R + 1) = 131.519 mol/s
V_dot := V*MW/ρ_v = 130.562 ft^3/s
A := V_dot/μ_0 = 34.9598 ft^2
A_actual := A/AA = 43.6997 ft^2
D := sqrt(4*A_actual/π) = 7.45924 ft
# D= 7.5 ft, rounded up to nearest 6''
# Closed book section
# #1 (3 pts) Name the three major types of trays used in distillation columns
# Bubble cap, valve, sieve
# #2 (2 pts) Explain turndown ratio? Which type of tray has the highest turndown ratio
# Bubble cap trays have the highest turndown ratio, and turndown ratio is the ratio of the maximum capacity of the column to the minimum capacity of the column, while still achieving products with desired specifications
# Explain the following operational limits for trays
# Entrainment is when liquid is carried upwards to the above tray by the vapor, due to excessive vapor flow
# Weeping is when liquid flows through the holes in the tray, due to insufficient vapor flow
# #4 (2 pts) What two variables typically dictate the pressure at which a distillation column
# operates?
# The desired purity of the distillate, and the existence of an azeotrope
# #5 (1 pts) What is the typical tray spacing used in a distillation column?
# 24 inches
# (1 pts) What percentage of the area of a tray is occupied by the downcomer?
# 5-30% depending on liquid load
